*Heading
** Job name: Reinforce_concrete_cylinder_compression-status-var-ON Model name: Model-1
** Generated by: Abaqus/CAE 2019
*Preprint, echo=NO, model=NO, history=NO, contact=NO
**
** PARTS
**
*Part, name=Part-1
*Node
      1,         -50.,           0.,         100.
      2,           0.,           0.,         100.
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*Element, type=C3D8
  1,  290,  291, 1237, 1229,   19,   20,  239,  238
  2,  291,  292, 1238, 1237,   20,   21,  240,  239
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*Nset, nset=Set-2, generate
    1,  2373,     1
*Elset, elset=Set-2, generate
    1,  1920,     1
** Section: Section-1
*Solid Section, elset=Set-2, controls=EC-1, material=Material-1
,
*End Part
**
*Part, name=Part-2
*Node
      1,           0.,           0.,           0.
      2,          10.,           0.,           0.
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*Element, type=B31
 1,  1,  2
 2,  2,  3
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*Nset, nset=Set-1, generate
  1,  21,   1
*Elset, elset=Set-1, generate
  1,  20,   1
*Nset, nset=Set-2, generate
  1,  21,   1
*Elset, elset=Set-2, generate
  1,  20,   1
** Section: Section-3  Profile: Profile-1
*Beam Section, elset=Set-2, material=Material-2, temperature=GRADIENTS, section=CIRC
2.5
0.,0.,-1.
*End Part
**
**
** ASSEMBLY
**
*Assembly, name=Assembly
**
*Instance, name=Part-1-1, part=Part-1
*End Instance
**
*Instance, name=Part-2-1, part=Part-2
         25.,           0.,         200.
         25.,           0.,         200.,          25., 1.00000001268805,         200., 89.9999992730282
*End Instance
**
*Instance, name=Part-2-1-rad-2, part=Part-2
23.7764129073788, 7.72542485937368,         200.
23.7764129073788, 7.72542485937368,         200., 23.621858133667, 8.70124533046446, 200.154554773712, 91.4022689048954
*End Instance
**
*Instance, name=Part-2-1-rad-3, part=Part-2
20.2254248593737, 14.6946313073118,         200.
20.2254248593737, 14.6946313073118,         200., 19.9301830635616, 15.6032921677381, 200.295241795812, 95.4796090923547
*End Instance
**
*Instance, name=Part-2-1-rad-4, part=Part-2
14.6946313073118, 20.2254248593737,         200.
14.6946313073118, 20.2254248593737,         200., 14.2812471883332, 21.0367368750466, 200.413384118979, 101.894330015786
*End Instance
**
*Instance, name=Part-2-1-rad-5, part=Part-2
7.72542485937369, 23.7764129073788,         200.
7.72542485937369, 23.7764129073788,         200., 7.21869300373835, 24.4738694833745, 200.506731855635, 110.211800752627
*End Instance
**
*Instance, name=Part-2-1-rad-6, part=Part-2
1.53080849893419e-15,          25.,         200.
1.53080849893419e-15,          25.,         200., -0.577350269189624, 25.5773502691896, 200.57735026919,         120.
*End Instance
**
*Instance, name=Part-2-1-rad-7, part=Part-2
-7.72542485937368, 23.7764129073788,         200.
-7.72542485937368, 23.7764129073788,         200., -8.35438502957204, 24.2333792119984, 200.628960170198, 130.882392777328
*End Instance
**
*Instance, name=Part-2-1-rad-8, part=Part-2
-14.6946313073118, 20.2254248593737,         200.
-14.6946313073118, 20.2254248593737,         200., -15.3598779220635, 20.5643849393801, 200.665246614752, 142.550785292882
*End Instance
**
*Instance, name=Part-2-1-rad-9, part=Part-2
-20.2254248593737, 14.6946313073118,         200.
-20.2254248593737, 14.6946313073118,         200., -20.9145766127575, 14.9185502743516, 200.689151753384, 154.757168430281
*End Instance
**
*Instance, name=Part-2-1-rad-10, part=Part-2
-23.7764129073788, 7.72542485937369,         200.
-23.7764129073788, 7.72542485937369,         200., -24.4791264094056, 7.83672374016944, 200.702713502027, 167.298362525798
*End Instance
**
*Instance, name=Part-2-1-rad-11, part=Part-2
        -25., 3.06161699786838e-15,         200.
        -25., 3.06161699786838e-15,         200., -25.7071067901584, 3.10491480217589e-15, 200.707106790158,         180.
*End Instance
**
*Instance, name=Part-2-1-rad-12, part=Part-2
-23.7764129073788, -7.72542485937369,         200.
-23.7764129073788, -7.72542485937369,         200., -24.4791264094056, -7.83672374016945, 200.702713502027, 192.701637474202
*End Instance
**
*Instance, name=Part-2-1-rad-13, part=Part-2
-20.2254248593737, -14.6946313073118,         200.
-20.2254248593737, -14.6946313073118,         200., -20.9145766127575, -14.9185502743516, 200.689151753384, 205.242831569719
*End Instance
**
*Instance, name=Part-2-1-rad-14, part=Part-2
-14.6946313073118, -20.2254248593737,         200.
-14.6946313073118, -20.2254248593737,         200., -15.3598779220635, -20.5643849393801, 200.665246614752, 217.449214707118
*End Instance
**
*Instance, name=Part-2-1-rad-15, part=Part-2
-7.72542485937369, -23.7764129073788,         200.
-7.72542485937369, -23.7764129073788,         200., -8.35438502957205, -24.2333792119984, 200.628960170198, 229.117607222672
*End Instance
**
*Instance, name=Part-2-1-rad-16, part=Part-2
-4.59242549680257e-15,         -25.,         200.
-4.59242549680257e-15,         -25.,         200., -0.57735026918963, -25.5773502691896, 200.57735026919,         240.
*End Instance
**
*Instance, name=Part-2-1-rad-17, part=Part-2
7.72542485937368, -23.7764129073788,         200.
7.72542485937368, -23.7764129073788,         200., 8.23215671500901, -23.0789563313832, 199.493268144365, 110.211800752627
*End Instance
**
*Instance, name=Part-2-1-rad-18, part=Part-2
14.6946313073118, -20.2254248593737,         200.
14.6946313073118, -20.2254248593737,         200., 15.1080154262905, -19.4141128437007, 199.586615881021, 101.894330015786
*End Instance
**
*Instance, name=Part-2-1-rad-19, part=Part-2
20.2254248593737, -14.6946313073118,         200.
20.2254248593737, -14.6946313073118,         200., 20.5206666551858, -13.7859704468856, 199.704758204188, 95.4796090923547
*End Instance
**
*Instance, name=Part-2-1-rad-20, part=Part-2
23.7764129073788, -7.72542485937369,         200.
23.7764129073788, -7.72542485937369,         200., 23.9309676810907, -6.74960438828292, 199.845445226288, 91.4022689048954
*End Instance
**
*Node
      1,           0.,           0.,           0.
*Nset, nset=Set-1, instance=Part-1-1
   11,   12,   13,   14,   15,  162
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*Elset, elset=Set-1, instance=Part-1-1
  841,  846,  851,  856,  865,  870
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*Nset, nset=Set-2, instance=Part-1-1
    4,    5,    6,    9,   10,   58
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*Elset, elset=Set-2, instance=Part-1-1
  121,  122,  123,  124,  141,  142
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*Nset, nset=Set-5
 1,
*Nset, nset=m_Set-6, instance=Part-2-1, generate
  1,  21,   1
*Nset, nset=m_Set-6, instance=Part-2-1-rad-2, generate
  1,  21,   1
*Nset, nset=m_Set-6, instance=Part-2-1-rad-4, generate
  1,  21,   1
*Nset, nset=m_Set-6, instance=Part-2-1-rad-6, generate
  1,  21,   1
*Nset, nset=m_Set-6, instance=Part-2-1-rad-14, generate
  1,  21,   1
*Nset, nset=m_Set-6, instance=Part-2-1-rad-10, generate
  1,  21,   1
*Nset, nset=m_Set-6, instance=Part-2-1-rad-18, generate
  1,  21,   1
*Nset, nset=m_Set-6, instance=Part-2-1-rad-8, generate
  1,  21,   1
*Nset, nset=m_Set-6, instance=Part-2-1-rad-16, generate
  1,  21,   1
*Nset, nset=m_Set-6, instance=Part-2-1-rad-12, generate
  1,  21,   1
*Nset, nset=m_Set-6, instance=Part-2-1-rad-20, generate
  1,  21,   1
*Nset, nset=m_Set-6, instance=Part-2-1-rad-3, generate
  1,  21,   1
*Nset, nset=m_Set-6, instance=Part-2-1-rad-7, generate
  1,  21,   1
*Nset, nset=m_Set-6, instance=Part-2-1-rad-15, generate
  1,  21,   1
*Nset, nset=m_Set-6, instance=Part-2-1-rad-11, generate
  1,  21,   1
*Nset, nset=m_Set-6, instance=Part-2-1-rad-19, generate
  1,  21,   1
*Nset, nset=m_Set-6, instance=Part-2-1-rad-5, generate
  1,  21,   1
*Nset, nset=m_Set-6, instance=Part-2-1-rad-9, generate
  1,  21,   1
*Nset, nset=m_Set-6, instance=Part-2-1-rad-17, generate
  1,  21,   1
*Nset, nset=m_Set-6, instance=Part-2-1-rad-13, generate
  1,  21,   1
*Elset, elset=m_Set-6, instance=Part-2-1, generate
  1,  20,   1
*Elset, elset=m_Set-6, instance=Part-2-1-rad-2, generate
  1,  20,   1
*Elset, elset=m_Set-6, instance=Part-2-1-rad-4, generate
  1,  20,   1
*Elset, elset=m_Set-6, instance=Part-2-1-rad-6, generate
  1,  20,   1
*Elset, elset=m_Set-6, instance=Part-2-1-rad-14, generate
  1,  20,   1
*Elset, elset=m_Set-6, instance=Part-2-1-rad-10, generate
  1,  20,   1
*Elset, elset=m_Set-6, instance=Part-2-1-rad-18, generate
  1,  20,   1
*Elset, elset=m_Set-6, instance=Part-2-1-rad-8, generate
  1,  20,   1
*Elset, elset=m_Set-6, instance=Part-2-1-rad-16, generate
  1,  20,   1
*Elset, elset=m_Set-6, instance=Part-2-1-rad-12, generate
  1,  20,   1
*Elset, elset=m_Set-6, instance=Part-2-1-rad-20, generate
  1,  20,   1
*Elset, elset=m_Set-6, instance=Part-2-1-rad-3, generate
  1,  20,   1
*Elset, elset=m_Set-6, instance=Part-2-1-rad-7, generate
  1,  20,   1
*Elset, elset=m_Set-6, instance=Part-2-1-rad-15, generate
  1,  20,   1
*Elset, elset=m_Set-6, instance=Part-2-1-rad-11, generate
  1,  20,   1
*Elset, elset=m_Set-6, instance=Part-2-1-rad-19, generate
  1,  20,   1
*Elset, elset=m_Set-6, instance=Part-2-1-rad-5, generate
  1,  20,   1
*Elset, elset=m_Set-6, instance=Part-2-1-rad-9, generate
  1,  20,   1
*Elset, elset=m_Set-6, instance=Part-2-1-rad-17, generate
  1,  20,   1
*Elset, elset=m_Set-6, instance=Part-2-1-rad-13, generate
  1,  20,   1
*Nset, nset=s_Set-7, instance=Part-1-1, generate
    1,  2373,     1
*Elset, elset=s_Set-7, instance=Part-1-1, generate
    1,  1920,     1
*Nset, nset=t_Set-3, instance=Part-1-1
    4,    5,    6,    9,   10,   58
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*Elset, elset=t_Set-3, instance=Part-1-1
  121,  122,  123,  124,  141,  142
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*Nset, nset=_PickedSet8, internal
 1,
** Constraint: Constraint-1
*Rigid Body, ref node=_PickedSet8, tie nset=t_Set-3
** Constraint: Constraint-2
*Embedded Element, host elset=s_Set-7
m_Set-6
*End Assembly
**
** ELEMENT CONTROLS
**
*Section Controls, name=EC-1, ELEMENT DELETION=YES
1., 1., 1.
*Amplitude, name=Amp-1
           0.01,            0.01,            0.02,            0.02,            0.03,            0.03,            0.04,            0.04
           0.05,            0.05,            0.06,            0.06,            0.07,            0.07,            0.08,            0.08
           0.09,            0.09,             0.1,             0.1,            0.11,            0.11,            0.12,            0.12
           0.13,            0.13,            0.14,            0.14,            0.15,            0.15,            0.16,            0.16
           0.17,            0.17,            0.18,            0.18,            0.19,            0.19,             0.2,             0.2
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           0.97,            0.97,            0.98,            0.98,            0.99,            0.99,              1.,              1.
**
** MATERIALS
**
*Material, name=Material-1
*Density
 2.5e-09,
*Elastic
 34007.3, 0.2
*Concrete Damaged Plasticity
35.,   0.1,  1.16,  0.67, 1e-05
*Concrete Compression Hardening
 25.5973,          0.
 30.1284, 1.95443e-05
 35.6329, 7.61914e-05
 42.5973, 0.000209666
 47.7158, 0.000336492
 52.4483, 0.000682671
 56.9962,  0.00134523
 58.0534,  0.00182259
 56.4088,   0.0023668
  53.321,  0.00284419
 49.8471,  0.00313964
 44.5273,  0.00352718
 39.7948,  0.00378611
 33.8036,  0.00422911
 29.0711,    0.004633
 23.7261,  0.00530232
 18.4986,  0.00645604
  13.271,  0.00760976
 8.04344,  0.00876348
 2.81589,   0.0099172
*Concrete Tension Stiffening
 2.842,0.
*Concrete Compression Damage
        0.,          0.
        0., 1.95443e-05
        0., 7.61914e-05
        0., 0.000209666
        0., 0.000336492
        0., 0.000682671
        0.,  0.00134523
        0.,  0.00182259
        0.,   0.0023668
        0.,  0.00284419
        0.,  0.00313964
        0.,  0.00352718
 0.0525057,  0.00378611
  0.195152,  0.00422911
*Concrete Failure, TYPE=Strain
0,0.009917198,0,0.932955095
*Material, name=Material-2
*Density
 7.8e-09,
*Elastic
208000., 0.3
*Plastic
208.,0.
**
** BOUNDARY CONDITIONS
**
** Name: BC-1 Type: Displacement/Rotation
*Boundary
Set-1, 1, 1
Set-1, 2, 2
Set-1, 3, 3
** ----------------------------------------------------------------
**
** STEP: Step-1
**
*Step, name=Step-1, nlgeom=YES
*Dynamic, Explicit
, 1.
*Bulk Viscosity
0.06, 1.2
**
** BOUNDARY CONDITIONS
**
** Name: BC-2 Type: Displacement/Rotation
*Boundary
Set-2, 1, 1
Set-2, 2, 2
** Name: BC-3 Type: Displacement/Rotation
*Boundary, amplitude=Amp-1
Set-5, 3, 3, 10.
**
** OUTPUT REQUESTS
**
*Restart, write, number interval=1, time marks=NO
**
** FIELD OUTPUT: F-Output-1
**
*Output, field, time interval=0.01
*Node Output
A, RF, U, V
*Element Output, directions=YES
DAMAGEC, EVF, LE, PE, PEEQ, PEEQVAVG, PEVAVG, S, STATUS, SVAVG
*Contact Output
CSTRESS,
**
** HISTORY OUTPUT: H-Output-1
**
*Output, history, variable=PRESELECT
*End Step
